// SBML level 2 version 1

model Field1974_Oregonator()
  // Field-Noyes Model of BZ Reaction
  // Citation
  // R.J.Field and R.M.Noyes,J.Chem.Phys.60,1877 (1974)
  // Description
  // Field Noyes Version of Belousov-Zhabotinsky Reaction. BrO3 is held constant; HOBr is typically ignored, and can be replaced by an empty-set. The stoichiometry f is typically taken as 1/2 or 1. .
  // Initially Generated by Cellerator Version 1.0 update 2.1220 using Mathematica 4.2 for Mac OS X (June 4, 2002), December 26, 2002 10:43:53, using (PowerMac,PowerPC, Mac OS X,MacOSX,Darwin). author=B.E.Shapiro
  // Modified with SBMLeditor by Nicolas Le Novère, to fit the original article.
  // This model originates from BioModels Database: A Database of Annotated Published Models (http://www.ebi.ac.uk/biomodels/). It is copyright (c) 2005-2011 The BioModels.net Team.
  // For more information see the terms of use.
  // To cite BioModels Database, please use: Li C, Donizelli M, Rodriguez N, Dharuri H, Endler L, Chelliah V, Li L, He E, Henry A, Stefan MI, Snoep JL, Hucka M, Le Novère N, Laibe C (2010) BioModels Database: An enhanced, curated and annotated resource for published quantitative kinetic models. BMC Syst Biol., 4:92.
  // biomodels.db:BIOMD0000000040
  // biomodels.db:MODEL6622000424
  // isDescribedBy doi:10.1063%2F1.1681288

  // Compartments:
  compartment BZ = 1;

  // Species:
  species Br in BZ = 1e-7; Br is "Br-";  // CHEBI:15858
  species $BrO3 in BZ = 0.06; BrO3 is "BrO3-";  // CHEBI:29223
  species Ce in BZ = 0.05; Ce is "Ce4+";
  species HBrO2 in BZ = 5e-11;
  species $HOBr in BZ = 0;

  // Parameters:
  f = 1;

  // Reactions:
  M1: Br + $BrO3 => HBrO2 + $HOBr; Br*BrO3*k1*BZ;
    k1 = 1.34;
  M2: Br + HBrO2 => 2 $HOBr; Br*HBrO2*k2*BZ;
    k2 = 1600000000;
  M3: $BrO3 + HBrO2 => Ce + 2 HBrO2; BrO3*HBrO2*k3*BZ;
    k3 = 8000;
  M4: 2 HBrO2 => $BrO3 + $HOBr; HBrO2^2*k4*BZ;
    k4 = 40000000;
  M5: Ce => f Br; Ce*k5*BZ;
    k5 = 1;
end
