// SBML level 2 version 1

model model_0000001()
  // Komarova2005_TheoreticalFramework_BasicArchitecture
  // This model according to the paper A Theoretical Framework for Specificity in Cell Signalling The model is "basic architecture" of Figure2A. Figure2B, Figure2C have been reproduced by MathSBML. The reproduced figures are slightly different from the original ones in the paper, the peak of [x2] is higher than 1 and is not decreasing dramatically when [x0]=0. And I think maybe the author shift the or scale the curves.
  // This model originates from BioModels Database: A Database of Annotated Published Models. It is copyright (c) 2005-2011 The BioModels.net Team.
  // For more information see the terms of use.
  // To cite BioModels Database, please use: Li C, Donizelli M, Rodriguez N, Dharuri H, Endler L, Chelliah V, Li L, He E, Henry A, Stefan MI, Snoep JL, Hucka M, Le Novère N, Laibe C (2010) BioModels Database: An enhanced, curated and annotated resource for published quantitative kinetic models. BMC Syst Biol., 4:92.
  // biomodels.db:BIOMD0000000125
  // biomodels.db:MODEL2451230486
  // isDescribedBy pubmed:16729058
  // occursIn taxonomy:33154
  // hasVersion kegg.pathway:map04010 GO:0000165
  // isVersionOf GO:0007166 GO:0051716 GO:0030159

  // Compartments:
  compartment cell = 1;  // isVersionOf GO:0005623

  // Species:
  species x1 in cell = 0;  // hasVersion interpro:IPR003527
  species x2 in cell = 0;
  species y2 in cell = 0;
  // x0(t) and y0(t) are the signal functions. The authors assume the network only receives one of the two signals at a time. Thus, if x0(t) is postive for some duration of time, then y0(t) is identically zero, and visa versa.
  species x0 in cell = 1;  // hasVersion interpro:IPR006210
  // x0(t) and y0(t) are the signal functions. The authors assume the network only receives one of the two signals at a time. Thus, if y0(t) is postive for some duration of time, then x0(t) is identically zero, and visa versa.
  species y0 in cell = 0;  // hasVersion interpro:IPR002072

  // Parameters:
  a1 = 2;
  a2 = 2;
  b1 = 1;
  b2 = 1;
  d1 = 1;
  d2x = 1;
  d2y = 1;

  // Reactions:
  x0_activates_x1: => x1; cell*a1*x0;  // modifiers: x0; isVersionOf GO:0045860 GO:0032147
  y0_activates_x1: => x1; cell*b1*y0;  // modifiers: y0; isVersionOf GO:0045860 GO:0032147
  x1_activates_x2: => x2; cell*x1*a2;  // modifiers: x1; isVersionOf GO:0045860 GO:0032147
  x1_activates_y2: => y2; cell*x1*b2;  // modifiers: x1; isVersionOf GO:0045860 GO:0032147
  x1_deactivation: x1 => ; cell*d1*x1;  // isVersionOf GO:0006469
  x2_deactivation: x2 => ; cell*d2x*x2;  // isVersionOf GO:0006469
  y2_deactivation: y2 => ; cell*d2y*y2;  // isVersionOf GO:0006469

  // Events:
  // x0 signaling applied as square pulses of magnitude 1 and duration 1.
  event_0000001: at (time > 1): x0 = 0;  // isVersionOf GO:0051716
end
