// SBML level 2 version 4

model Nakakuki2010_CellFateDecision_Core()
  // This model describes the activation of immediate early genes such as cFos after EGF or heregulin (HRG) stimulation of the MAPK pathway. Phosphorylated cFos is a key transcription factor triggering downstream cascades of cell fate determination. The model can explain how the switch-like response of p-cFos emerges from the spatiotemporal dynamics. The model comprises lumped reaction kinetics of the signal transduction pathway, the transcriptional and the posttranslational feedback and feedforward loops. The parameter set implemented here corresponds to that used for generating Figs. 4 B,C,D (red curves for 10nM HRG) of the below article in Cell (2010). Moreover, we found that the same model described well the dynamics in different cell types (MCF-7 and PC-12), of different ligands (EGF and HRG) and at different doses (0.1nM, 1nM, 10nM) for a unique set of parameter values (as implemented here and reported in Table SD4_1 of the article) except for four parameters characterising the input, cytoplasmic ppERK. These four parameters K1, K2, tau1 and tau2 are used in the two equations involving species x1 and x2. These two equations define a phenomenological input module to describe the ligand-, dose- and cell type-dependent dynamics of ppERKc which are not modelled in mechanistic detail here. The four parameter values can be adjusted to model a specific ligand, dose and cell type. 8 parameter sets for different experiments are given in Table SD4_2 of the article. This SBML file, however, carries just one such parameter set. We have chosen that of MCF-7 cells stimulated by 10nM of HRG. To reproduce all simulations from the article, please replace the parameter values for K1, K2, tau1, tau2 as needed.
  // Ligand-specific c-Fos expression emerges from the spatiotemporal control of ErbB network dynamics.
  // Takashi Nakakuki(1), Marc R. Birtwistle(2,3,4), Yuko Saeki(1,5), Noriko Yumoto(1,5), Kaori Ide(1), Takeshi Nagashima(1,5), Lutz Brusch(6), Babatunde A. Ogunnaike(3), Mariko Hatakeyama(1,5), and Boris N. Kholodenko(2,4); Cell In Press, online 20 May 2010, doi:10.1016/j.cell.2010.03.054
  // (1) RIKEN Advanced Science Institute, Computational Systems Biology Research Group, Advanced Computational Sciences Department, 1-7-22 Tsurumi-ku, Yokohama, Kanagawa, 230-0045, Japan
  // (2) Systems Biology Ireland, University College Dublin, Belfield, Dublin 4, Ireland
  // (3) University of Delaware, Department of Chemical Engineering, 150 Academy St., Newark, DE 19716, USA
  // (4) Thomas Jefferson University, Department of Pathology, Anatomy, and Cell Biology, 1020 Locust Street, Philadelphia, PA 19107, USA
  // (5) RIKEN Research Center for Allergy and Immunology, Laboratory for Cellular Systems Modeling, 1-7-22 Tsurumi-ku, Yokohama, 230-0045, Japan
  // (6) Dresden University of Technology, Center for Information Services and High Performance Computing, 01062 Dresden, Germany
  // This model originates from BioModels Database: A Database of Annotated Published Models (http://www.ebi.ac.uk/biomodels/). It is copyright (c) 2005-2011 The BioModels.net Team.
  // For more information see the terms of use.
  // To cite BioModels Database, please use: Li C, Donizelli M, Rodriguez N, Dharuri H, Endler L, Chelliah V, Li L, He E, Henry A, Stefan MI, Snoep JL, Hucka M, Le Novère N, Laibe C (2010) BioModels Database: An enhanced, curated and annotated resource for published quantitative kinetic models. BMC Syst Biol., 4:92.
  // biomodels.db:BIOMD0000000251
  // biomodels.db:MODEL1003170000
  // isDescribedBy pubmed:20493519
  // hasVersion GO:0035559
  // occursIn taxonomy:9606
  // isPartOf kegg.pathway:hsa04010

  // Compartments:
  compartment compartment = 1;  // isVersionOf GO:0005623

  // Species:
  species x1 in compartment = 0;
  species x2 in compartment = 0;
  species ppERKn in compartment = 0; ppERKn is "ppERK(nucleus)";  // isVersionOf reactome:REACT_13301.1; isVersionOf uniprot:P27361 uniprot:P28482; isVersionOf kegg.compound:C00562
  species DUSP in compartment = 0;  // isVersionOf uniprot:P28562 uniprot:Q05923 uniprot:Q13115 uniprot:Q16690; isVersionOf interpro:IPR014393; isEncodedBy kegg.genes:K04459; isVersionOf reactome:REACT_12976.1
  species pRSKn in compartment = 0;  // reactome:REACT_13229.1
  species cFOSp in compartment = 0; cFOSp is "cFOS preRNA";  // encodes reactome:REACT_21788.1; isEncodedBy hsa:2353
  species cFOS in compartment = 0;  // isVersionOf reactome:REACT_21788.1; isVersionOf uniprot:P01100
  species pcFOS in compartment = 0; pcFOS is "pc-FOS";  // reactome:REACT_21988.1; isVersionOf uniprot:P01100
  species cFOSm in compartment = 0; cFOSm is "cFOSmRNA";  // encodes uniprot:P01100; encodes reactome:REACT_21788.1
  species $ppERKc in compartment; ppERKc is "ppERK(cytosol)";  // isVersionOf reactome:REACT_3037 reactome:REACT_2640; isVersionOf uniprot:P27361 uniprot:P28482; isVersionOf kegg.compound:C00562

  // Parameters:
  k7 = 0.5;
  k11 = 0.11;
  k13 = 0.06;
  L = 1;
  K1 = 1.09;
  tau1 = 3.07;
  K2 = 2.89;
  tau2 = 472;

  // Assignment rules:
  ppERKc := x1 - x2;

  // Reactions:
  _1_PhIM_1: => x1; compartment*(-x1/tau1 + K1*L/tau1);  // isVersionOf GO:0000187
  _1_PhIM_2: => x2; compartment*(-x2/tau2 + K2*L/tau2);  // isVersionOf GO:0043407
  _2a_ppERKn: => ppERKn; compartment*(k1*ppERKc - k2*ppERKn - k3*DUSP*ppERKn);  // modifiers: ppERKc, DUSP; hasPart GO:0000189 GO:0017017; hasPart reactome:REACT_1866 reactome:REACT_487 reactome:REACT_12439
    k1 = 15; k2 = 50; k3 = 14;
  _2b_DUSP: => DUSP; compartment*k*ppERKn;  // modifiers: ppERKn; isVersionOf GO:0004707
    k = 1;
  _3_pRSKn: => pRSKn; compartment*(k4*ppERKn - k5*pRSKn);  // modifiers: ppERKn; isVersionOf reactome:REACT_20562; isVersionOf reactome:REACT_20510.1
    k4 = 0.1; k5 = 0.15;
  _4_cFOSp: => cFOSp; compartment*((ppERKn*pRSKn)^n/(k6^n + (ppERKn*pRSKn)^n) - k7*cFOSp);  // modifiers: ppERKn, pRSKn; isVersionOf GO:0009299
    k6 = 0.13; n = 1.1;
  _5_cFOSm: => cFOSm; compartment*(k7*cFOSp - k8*cFOSm);  // modifiers: cFOSp; isVersionOf GO:0006397
    k8 = 0.08;
  _6_cFOS: => cFOS; compartment*(k9*cFOSm - k10*cFOS - k11*cFOS*ppERKc + k13*pcFOS);  // modifiers: cFOSm, ppERKc, pcFOS; isVersionOf GO:0006412
    k10 = 0.3; k9 = 0.3;
  _7_pcFOS: => pcFOS; compartment*(k11*cFOS*ppERKc - k12*pcFOS - k13*pcFOS);  // modifiers: cFOS, ppERKc; isVersionOf ec-code:2.7.11.24; isVersionOf GO:0004707; isVersionOf kegg.reaction:R00162; isVersionOf reactome:REACT_21251
    k12 = 0.001;

  // Unit definitions:
  unit volume = 1e-3 litre;
  unit time = 60 second;
  unit substance = 1e-3 mole;
end
