// SBML level 2 version 4

model Model_1()
  // Fujita2010_Akt_Signalling_EGF
  // EGF dependent Akt pathway model
  // made by Kazuhiro A. Fujita.
  // This is the EGF dependent Akt pathway model described in:
  // Decoupling of receptor and downstream signals in the Akt pathway by its low-pass filter characteristics.
  // Fujita KA, Toyoshima Y, Uda S, Ozaki Y, Kubota H, and Kuroda S. Sci Signal. 2010 Jul 27;3(132):ra56. PMID:20664065; DOI:10.1126/scisignal.2000810
  // Abstract:
  // In cellular signal transduction, the information in an external stimulus is encoded in temporal patterns in the activities of signaling molecules; for example, pulses of a stimulus may produce an increasing response or may produce pulsatile responses in the signaling molecules. Here, we show how the Akt pathway, which is involved in cell growth, specifically transmits temporal information contained in upstream signals to downstream effectors. We modeled the epidermal growth factor (EGF)–dependent Akt pathway in PC12 cells on the basis of experimental results. We obtained counterintuitive results indicating that the sizes of the peak amplitudes of receptor and downstream effector phosphorylation were decoupled; weak, sustained EGF receptor (EGFR) phosphorylation, rather than strong, transient phosphorylation, strongly induced phosphorylation of the ribosomal protein S6, a molecule downstream of Akt. Using frequency response analysis, we found that a three-component Akt pathway exhibited the property of a low-pass filter and that this property could explain decoupling of the peak amplitudes of receptor phosphorylation and that of downstream effectors. Furthermore, we found that lapatinib, an EGFR inhibitor used as an anticancer drug, converted strong, transient Akt phosphorylation into weak, sustained Akt phosphorylation, and, because of the low-pass filter characteristics of the Akt pathway, this led to stronger S6 phosphorylation than occurred in the absence of the inhibitor. Thus, an EGFR inhibitor can potentially act as a downstream activator of some effectors.
  // The different versions of input, step, pulse and ramp, can be simulated using the parameters EGF_conc_pulse, EGF_conc_step and EGF_conc_ramp. Depending on which one is set unequal to 0, either a continous pulse with value EGF_conc_pulse, a 60 second step with EGF_conc_step or a signal increasing from 0 to EGF_conc_pulse over a time periode of 3600 seconds are used as input. In case more than one parameter are set to values greater than 0 these input profiles are added to each other. The pulse time and the time over which the ramp input increases can be set by pulse_time and ramp_time.
  // This model originates from BioModels Database: A Database of Annotated Published Models. It is copyright (c) 2005-2011 The BioModels.net Team.
  // For more information see the terms of use.
  // To cite BioModels Database, please use: Li C, Donizelli M, Rodriguez N, Dharuri H, Endler L, Chelliah V, Li L, He E, Henry A, Stefan MI, Snoep JL, Hucka M, Le Novère N, Laibe C (2010) BioModels Database: An enhanced, curated and annotated resource for published quantitative kinetic models. BMC Syst Biol., 4:92.
  // biomodels.db:BIOMD0000000262
  // biomodels.db:MODEL1004060001
  // isDescribedBy pubmed:20664065
  // hasVersion kegg.pathway:rno04012 reactome:REACT_12464.1 reactome:REACT_9417.3 GO:0007173 GO:0043491 GO:0071364
  // occursIn taxonomy:10116 BTO:0001009

  // Compartments:
  compartment Cell = 1;  // isVersionOf GO:0005623

  // Species:
  species $EGF in Cell;  // substance in ng; isVersionOf interpro:IPR006209; isVersionOf GO:0005154 GO:0045741
  species EGFR in Cell = pro_EGFR;  // isVersionOf uniprot:Q9WTS1
  species pEGFR in Cell = 0;  // isVersionOf uniprot:Q9WTS1
  species pEGFR_Akt in Cell = 0;  // hasPart uniprot:Q9WTS1 uniprot:Q63484; hasVersion kegg.compound:C00562
  species Akt in Cell = 0.04330902/Cell;  // isVersionOf uniprot:Q63484
  species pAkt in Cell = 0;  // isVersionOf uniprot:Q63484; isVersionOf kegg.compound:C00562
  species S6 in Cell = 3.543167/Cell;  // isVersionOf uniprot:P62755
  species pAkt_S6 in Cell = 0;  // hasVersion uniprot:P62755; hasVersion uniprot:Q63484 kegg.compound:C00562
  species pS6 in Cell = 0;  // isVersionOf uniprot:P62755; isVersionOf kegg.compound:C00562
  species $pro_EGFR in Cell = 68190.18/Cell;  // isVersionOf uniprot:Q9WTS1
  species EGF_EGFR in Cell = 0;  // hasPart uniprot:Q9WTS1; hasVersion uniprot:P07522

  // Parameters:
  pEGFR_total has ng_per_ml;  // isVersionOf kegg.compound:C00562; hasVersion uniprot:Q63484
  pAkt_total has ng_per_ml;  // isVersionOf kegg.compound:C00562; hasVersion uniprot:Q63484
  pEGFR_scaleFactor = 0.0001817348 ng;
  pAkt_scaleFactor = 60.05875 ng;
  pS6_scaleFactor = 49886.23 ng;
  pS6_total has ng_per_ml;  // isVersionOf kegg.compound:C00562; isVersionOf uniprot:P62755
  EGF_conc_step = 0 ng_per_ml;
  EGF_conc_impulse = 0 ng_per_ml;
  EGF_conc_ramp = 30 ng_per_ml;
  EGFR_turnover = 0.0001063861 per_sec;
  pulse_time = 60 time;
  ramp_time = 3600 time;

  // Assignment rules:
  EGF := EGF_conc_step + piecewise(EGF_conc_impulse, time <= pulse_time, 0) + EGF_conc_ramp*time/ramp_time;
  pEGFR_total := (pEGFR + pEGFR_Akt)*pEGFR_scaleFactor;
  pAkt_total := (pAkt + pAkt_S6)*pAkt_scaleFactor;
  pS6_total := pS6*pS6_scaleFactor;

  // Reactions:
  reaction_1: $EGF + EGFR -> EGF_EGFR; Cell*(reaction_1_k1*EGF*EGFR - reaction_1_k2*EGF_EGFR); reaction_1 is "EGF+EGFR";  // isVersionOf GO:0005515; isVersionOf GO:0005154
    reaction_1_k1 = 0.00673816; reaction_1_k2 = 0.040749 per_sec;
  reaction_2: pEGFR + Akt -> pEGFR_Akt; Cell*(reaction_2_k1*pEGFR*Akt - reaction_2_k2*pEGFR_Akt); reaction_2 is "pEGFR+Akt";  // isVersionOf GO:0005515
    reaction_2_k1 = 1.5543e-5 per_conc_per_sec; reaction_2_k2 = 0.00517473 per_sec;
  Akt_phosphorylation: pEGFR_Akt => pEGFR + pAkt; Cell*Akt_phosphorylation_k1*pEGFR_Akt;  // isVersionOf GO:0004672
    Akt_phosphorylation_k1 = 0.0305684 per_sec;
  pEGFR_degradation: pEGFR => ; Cell*pEGFR_degradation_k1*pEGFR;  // isVersionOf GO:0030163
    pEGFR_degradation_k1 = 0.0997194 per_sec;
  reaction_5: pAkt + S6 -> pAkt_S6; Cell*(reaction_5_k1*pAkt*S6 - reaction_5_k2*pAkt_S6); reaction_5 is "pAkt+S6";  // isVersionOf GO:0005515; isVersionOf reactome:REACT_12442
    reaction_5_k1 = 2.10189e-6 per_conc_per_sec; reaction_5_k2 = 5.1794e-15 per_sec;
  S6_phosphorylation: pAkt_S6 => pAkt + pS6; Cell*S6_phosphorylation_k1*pAkt_S6;  // isVersionOf GO:0004672
    S6_phosphorylation_k1 = 0.00121498 per_sec;
  pAkt_dephospho: pAkt => Akt; Cell*pAkt_dephospho_k1*pAkt;  // isVersionOf GO:0004721
    pAkt_dephospho_k1 = 0.0327962 per_sec;
  pS6_dephospho: pS6 => S6; Cell*pS6_dephospho_k1*pS6;  // isVersionOf GO:0004721
    pS6_dephospho_k1 = 0.00113102 per_sec;
  EGFR_synthesis: $pro_EGFR => EGFR; Cell*EGFR_turnover*pro_EGFR;  // isVersionOf GO:0010467
  EGFR_phosphorylation: EGF_EGFR => pEGFR; Cell*EGFR_phosphorylation_k1*EGF_EGFR;  // isVersionOf GO:0004672
    EGFR_phosphorylation_k1 = 0.0192391 per_sec;
  EGFR_degradation: EGFR => ; Cell*EGFR_turnover*EGFR;  // isVersionOf GO:0030163

  // Unit definitions:
  unit substance = dimensionless; substance is "arbitrary_amount";
  unit conc = dimensionless / (1e-3 litre); conc is "arbitrary_conc";
  unit time = second; time is "seconds";
  unit volume = 1e-3 litre; volume is "ml";
  unit per_sec = 1 / second; per_sec is "per second";
  unit ng = 1e-9 gram;
  unit ng_per_ml = 1e-9 gram / (1e-3 litre);
  unit per_conc_per_sec = 1e-3 litre * dimensionless / second; per_conc_per_sec is "per conc per second";
end
