// SBML level 2 version 4

model Model_1()
  // Fujita2010_Akt_Signalling_NGF
  // NGF dependent Akt pathway model
  // made by Kazuhiro A. Fujita.
  // This is the NGF dependent Akt pathway model described in:
  // Decoupling of receptor and downstream signals in the Akt pathway by its low-pass filter characteristics.
  // Fujita KA, Toyoshima Y, Uda S, Ozaki Y, Kubota H, and Kuroda S. Sci Signal. 2010 Jul 27;3(132):ra56. PMID:20664065; DOI:10.1126/scisignal.2000810
  // Abstract:
  // In cellular signal transduction, the information in an external stimulus is encoded in temporal patterns in the activities of signaling molecules; for example, pulses of a stimulus may produce an increasing response or may produce pulsatile responses in the signaling molecules. Here, we show how the Akt pathway, which is involved in cell growth, specifically transmits temporal information contained in upstream signals to downstream effectors. We modeled the epidermal growth factor (EGF)–dependent Akt pathway in PC12 cells on the basis of experimental results. We obtained counterintuitive results indicating that the sizes of the peak amplitudes of receptor and downstream effector phosphorylation were decoupled; weak, sustained EGF receptor (EGFR) phosphorylation, rather than strong, transient phosphorylation, strongly induced phosphorylation of the ribosomal protein S6, a molecule downstream of Akt. Using frequency response analysis, we found that a three-component Akt pathway exhibited the property of a low-pass filter and that this property could explain decoupling of the peak amplitudes of receptor phosphorylation and that of downstream effectors. Furthermore, we found that lapatinib, an EGFR inhibitor used as an anticancer drug, converted strong, transient Akt phosphorylation into weak, sustained Akt phosphorylation, and, because of the low-pass filter characteristics of the Akt pathway, this led to stronger S6 phosphorylation than occurred in the absence of the inhibitor. Thus, an EGFR inhibitor can potentially act as a downstream activator of some effectors.
  // The different versions of input, step, pulse and ramp, can be simulated using the parameters NGF_conc_pulse, NGF_conc_step and NGF_conc_ramp. Depending on which one is set unequal to 0, either a continous pulse with value NGF_conc_pulse, a 60 second step with NGF_conc_step or a signal increasing from 0 to NGF_conc_pulse over a time periode of 3600 seconds are used as input. In case more than one parameter is set to values greater than 0 these input profiles are added to each other. The pulse time and the time over which the ramp input increases can be set by pulse_time and ramp_time.
  // This model originates from BioModels Database: A Database of Annotated Published Models. It is copyright (c) 2005-2011 The BioModels.net Team.
  // For more information see the terms of use.
  // To cite BioModels Database, please use: Li C, Donizelli M, Rodriguez N, Dharuri H, Endler L, Chelliah V, Li L, He E, Henry A, Stefan MI, Snoep JL, Hucka M, Le Novère N, Laibe C (2010) BioModels Database: An enhanced, curated and annotated resource for published quantitative kinetic models. BMC Syst Biol., 4:92.
  // biomodels.db:BIOMD0000000263
  // biomodels.db:MODEL1004060002
  // isDescribedBy pubmed:20664065
  // hasVersion reactome:REACT_12056 reactome:REACT_12464.1 GO:0043491 GO:0048011
  // occursIn taxonomy:10116 BTO:0001009

  // Compartments:
  compartment Cell = 1;  // GO:0005623

  // Species:
  species $NGF in Cell;  // substance in ng; isVersionOf uniprot:P25427; isVersionOf GO:0005167
  species TrkA in Cell = pro_TrkA;  // GO:0048406; isVersionOf uniprot:P35739
  species pTrkA in Cell = 0;  // isVersionOf uniprot:P35739; isVersionOf GO:0048406
  species pTrkA_Akt in Cell = 0;  // hasPart uniprot:P35739 uniprot:Q63484; hasVersion kegg.compound:C00562
  species Akt in Cell = 1.155949;  // isVersionOf uniprot:Q63484
  species pAkt in Cell = 0;  // isVersionOf kegg.compound:C00562; isHomologTo reactome:REACT_13319; isVersionOf GO:0004672
  species S6 in Cell = 3.552336;  // isVersionOf uniprot:P62755
  species pAkt_S6 in Cell = 0;  // hasVersion uniprot:Q63484; hasVersion uniprot:P62755 kegg.compound:C00562
  species pS6 in Cell = 0;  // isVersionOf kegg.compound:C00562; isVersionOf uniprot:P62755
  species $pro_TrkA in Cell = 8.520651;  // isVersionOf uniprot:P35739
  species NGF_TrkA in Cell = 0;  // hasPart uniprot:P35739 uniprot:P25427

  // Parameters:
  pTrkA_total has ng_per_ml;  // isVersionOf GO:0048406; isVersionOf uniprot:P35739 kegg.compound:C00562
  pAkt_total has ng_per_ml;  // isVersionOf kegg.compound:C00562; hasVersion uniprot:Q63484
  pTrkA_scaleFactor = 0.8487835 ng;
  pAkt_scaleFactor = 2.423812 ng;
  pS6_scaleFactor = 0.5258427 ng;
  pS6_total has ng_per_ml;  // isVersionOf uniprot:P62755; isVersionOf kegg.compound:C00562
  NGF_conc_step = 0 ng_per_ml;
  NGF_conc_pulse = 0 ng_per_ml;
  NGF_conc_ramp = 30 ng_per_ml;
  TrkA_turnover = 0.001103244 per_sec;
  pulse_time = 60 time;
  ramp_time = 3600 time;

  // Assignment rules:
  pS6_total := pS6*pS6_scaleFactor;
  pAkt_total := (pAkt + pAkt_S6)*pAkt_scaleFactor;
  pTrkA_total := (pTrkA + pTrkA_Akt)*pTrkA_scaleFactor;
  NGF := NGF_conc_step + piecewise(NGF_conc_pulse, time <= pulse_time, 0) + NGF_conc_ramp*time/ramp_time;

  // Reactions:
  reaction_1: $NGF + TrkA -> NGF_TrkA; Cell*(reaction_1_k1*NGF*TrkA - reaction_1_k2*NGF_TrkA); reaction_1 is "NGF+TrkA";  // isVersionOf reactome:REACT_10088; isVersionOf GO:0005167
    reaction_1_k1 = 0.00269408; reaction_1_k2 = 0.0133747;
  reaction_2: pTrkA + Akt -> pTrkA_Akt; Cell*(reaction_2_k1*pTrkA*Akt - reaction_2_k2*pTrkA_Akt); reaction_2 is "pTrkA+Akt";  // isVersionOf GO:0005515
    reaction_2_k1 = 0.0882701 per_conc_per_sec; reaction_2_k2 = 1.47518e-10 per_sec;
  Akt_phosphorylation: pTrkA_Akt => pTrkA + pAkt; Cell*Akt_phosphorylation_k1*pTrkA_Akt;  // isVersionOf GO:0004672
    Akt_phosphorylation_k1 = 0.0202517;
  pTrkA_degradation: pTrkA => ; Cell*pTrkA_degradation_k1*pTrkA;  // isVersionOf GO:0030163
    pTrkA_degradation_k1 = 0.0684084 per_sec;
  reaction_5: pAkt + S6 -> pAkt_S6; Cell*(reaction_5_k1*pAkt*S6 - reaction_5_k2*pAkt_S6); reaction_5 is "pAkt+S6";  // isVersionOf reactome:REACT_12442; isVersionOf GO:0005515
    reaction_5_k1 = 68.3666 per_conc_per_sec; reaction_5_k2 = 5.23519 per_sec;
  S6_phosphorylation: pAkt_S6 => pAkt + pS6; Cell*S6_phosphorylation_k1*pAkt_S6;  // isVersionOf GO:0004672; hasVersion reactome:REACT_12442
    S6_phosphorylation_k1 = 0.0056515 per_sec;
  pAkt_dephospho: pAkt => Akt; Cell*pAkt_dephospho_k1*pAkt;  // isVersionOf GO:0004721
    pAkt_dephospho_k1 = 1.28135 per_sec;
  pS6_dephospho: pS6 => S6; Cell*pS6_dephospho_k1*pS6;  // isVersionOf GO:0004721
    pS6_dephospho_k1 = 0.000293167 per_sec;
  TrkA_synthesis: $pro_TrkA => TrkA; Cell*TrkA_turnover*pro_TrkA;  // isVersionOf GO:0010467
  TrkA_phosphorylation: NGF_TrkA => pTrkA; Cell*TrkA_phosphorylation_k1*NGF_TrkA;  // isVersionOf GO:0004672
    TrkA_phosphorylation_k1 = 0.00833178 per_sec;
  TrkA_degradation: TrkA => ; Cell*TrkA_turnover*TrkA;  // isVersionOf GO:0030163

  // Unit definitions:
  unit substance = dimensionless; substance is "arbitrary_amount";
  unit conc = dimensionless / (1e-3 litre); conc is "arbitrary_conc";
  unit time = second; time is "seconds";
  unit volume = 1e-3 litre; volume is "ml";
  unit per_sec = 1 / second; per_sec is "per second";
  unit ng = 1e-9 gram;
  unit ng_per_ml = 1e-9 gram / (1e-3 litre);
  unit per_conc_per_sec = 1e-3 litre * dimensionless / second; per_conc_per_sec is "per conc per second";
end
