// SBML level 2 version 1
// created with rxncon.org

model 5a562c17-faf8-4e39-be9d-2641cc9cde7e()

  // Compartments:
  compartment cell = 1;

  // Species:
  species A_bd_B_bd_bd_C_bd in cell = 100; A_bd_B_bd_bd_C_bd is "A(bd_B_bd,bd_C_bd)";
  species C_bd_A_bd in cell = 100; C_bd_A_bd is "C(bd_A_bd)";
  species B_bd_A_bd in cell = 100; B_bd_A_bd is "B(bd_A_bd)";
  species S4 in cell = 0; S4 is "A(bd_B_bd!1,bd_C_bd)__B(bd_A_bd!1)";
  species S5 in cell = 0; S5 is "A(bd_B_bd!1,bd_C_bd!2)__B(bd_A_bd!1)__C(bd_A_bd!2)";
  species S6 in cell = 0; S6 is "A(bd_B_bd,bd_C_bd!1)__C(bd_A_bd!1)";

  // Parameters:
  kf0 = 1;
  kr0 = 1;

  // Reactions:
  R1: A_bd_B_bd_bd_C_bd + B_bd_A_bd => S4; kf0*A_bd_B_bd_bd_C_bd*B_bd_A_bd;
  R2: S4 => A_bd_B_bd_bd_C_bd + B_bd_A_bd; kr0*S4;
  R3: C_bd_A_bd + S4 => S5; kf0*C_bd_A_bd*S4;
  R4: S5 => B_bd_A_bd + S6; kr0*S5;
  R5: S5 => C_bd_A_bd + S4; kr0*S5;
  R6: B_bd_A_bd + S6 => S5; kf0*B_bd_A_bd*S6;
end
